// COMSOL Multiphysics 5.6.0.401 model "Static Analysis of MEMS Resonator.mph"
// Outline of the model tree

Parameters
  Vdc = 10[V]  // Bias Voltage

Selections
  sel1: Explicit "Air" on domains 1
  sel2: Explicit "Terminals" on no boundaries

Common definitions
  free1: DeformingDomain on selection sel1 | smoothingType = hyperelastic
  sym1: Symmetry "Symmetry/Roller 1" on no boundaries

Geometry
  geom1 "Geometry 1" (3D, length unit µm)
    blk1: Block "The Gate" | size = {18, 2, 0.2}
    blk2: Block "The slot" | pos = {4, 0, 0.1}; size = {10, 2, 0.1}
    dif1: Difference | input = blk1; input2 = blk2
    blk3: Block "The drain" | pos = {2, 0, 0.22}; size = {2, 2, 0.08}
    blk4: Block "The source" | pos = {14, 0, 0.22}; size = {2, 2, 0.08}
    blk5: Block "Source dielectric" | pos = {14, 0, 0.2}; size = {2, 2, 0.02}
    blk6: Block "Drain dielectric" | pos = {2, 0, 0.2}; size = {2, 2, 0.02}
    blk7: Block "Graphene layer" | pos = {4, 0, 0.3}; size = {10, 2, 0.00035}
    blk8: Block "PMMA layer" | pos = {4, 0, 0.30035}; size = {10, 2, 0.14965}
    blk9: Block | pos = {-3, -1, -0.225}; size = {24, 4, 0.9}
    uni1: Union | input = blk3, blk6
    uni2: Union | input = blk4, blk5
    uni3: Union | input = blk7, blk8
    fin: Finalize "Form Union"

Materials
  mat1: Common "PMMA - Polymethyl methacrylate" on domains 6
    def "Basic"
      thermalexpansioncoefficient = 70e-6[1/K]
      heatcapacity = 1420[J/(kg*K)]
      relpermittivity = 3.0
      density = 1180[kg/m^3]
      thermalconductivity = 0.19[W/(m*K)]
    Enu "Young's modulus and Poisson's ratio"
      youngsmodulus = 2.94e9[Pa]
      poissonsratio = 0.36
  mat2: Common "Graphene" on domains 5
    def "Basic"
      youngsmodulus = 1e12
      poissonsratio = 0.17
      density = 2270
      thermalconductivity = 5300
      relpermittivity = 3
      heatcapacity = 700
    ThermalExpansion
      alphatan = -3.75e-6
  mat3: Common "Polysilicon" on domains 2
    def "Basic"
      electricconductivity = sigma(T)
      thermalexpansioncoefficient = alpha(T)
      heatcapacity = 678[J/(kg*K)]
      relpermittivity = 4.5
      density = 2320[kg/m^3]
      thermalconductivity = k(T)
      sigma: Analytic | expr = 1/(2e-5*(1+1.25e-3*(T-298.15))); args = T; dermethod = manual; argders = {T, d(1/(2e-5*(1+1.25e-3*(T-298.15))), T)}; argunit = K; fununit = S/m
      alpha: Analytic | expr = (3.725*(1-exp(-5.88e-3*(T-125)))+5.548e-4*T)*1e-6; args = T; dermethod = manual; argders = {T, d((3.725*(1-exp(-5.88e-3*(T-125)))+5.548e-4*T)*1e-6, T)}; argunit = K; fununit = 1/K
      k: Analytic | expr = 1/(-2.2e-11*T^3 + 9e-8*T^2 - 1e-5*T + 0.014); args = T; dermethod = manual; argders = {T, d(1/(-2.2e-11*T^3 + 9e-8*T^2 - 1e-5*T + 0.014), T)}; argunit = K; fununit = W/(m*K)
    Enu "Young's modulus and Poisson's ratio"
      youngsmodulus = 169e9[Pa]
      poissonsratio = 0.22
    linzRes "Linearized resistivity"
      rho0 = 2e-5
      alpha = 1.25e-3
      Tref = 298.15[K]
  mat4: Common "Air" on domains 1, 3, 7
    def "Basic"
      thermalexpansioncoefficient = alpha_p(pA,T)
      molarmass = 0.02897[kg/mol]
      bulkviscosity = muB(T)
      relpermeability = 1
      relpermittivity = 1
      dynamicviscosity = eta(T)
      ratioofspecificheat = 1.4
      electricconductivity = 0[S/m]
      heatcapacity = Cp(T)
      density = rho(pA,T)
      thermalconductivity = k(T)
      soundspeed = cs(T)
      eta: Piecewise | arg = T; pieces = {200.0, 1600.0, -8.38278E-7+8.35717342E-8*T^1-7.69429583E-11*T^2+4.6437266E-14*T^3-1.06585607E-17*T^4}; argunit = K; fununit = Pa*s
      Cp: Piecewise | arg = T; pieces = {200.0, 1600.0, 1047.63657-0.372589265*T^1+9.45304214E-4*T^2-6.02409443E-7*T^3+1.2858961E-10*T^4}; argunit = K; fununit = J/(kg*K)
      rho: Analytic | expr = pA*0.02897/R_const[K*mol/J]/T; args = {pA, T}; argunit = Pa,K; fununit = kg/m^3
      k: Piecewise | arg = T; pieces = {200.0, 1600.0, -0.00227583562+1.15480022E-4*T^1-7.90252856E-8*T^2+4.11702505E-11*T^3-7.43864331E-15*T^4}; argunit = K; fununit = W/(m*K)
      cs: Analytic | expr = sqrt(1.4*R_const[K*mol/J]/0.02897*T); args = T; argunit = K; fununit = m/s
      an1: Analytic | funcname = alpha_p; expr = -1/rho(pA,T)*d(rho(pA,T),T); args = {pA, T}; argunit = Pa,K; fununit = 1/K
      an2: Analytic "Analytic 2a" | funcname = muB; expr = 0.6*eta(T); args = T; argunit = K; fununit = Pa*s
    RefractiveIndex
      n = 1
      ki = 0
    NonlinearModel
      BA = (def.gamma+1)/2
    idealGas
      Rs = R_const/Mn
      heatcapacity = Cp(T)
      ratioofspecificheat = 1.4
      molarmass = 0.02897
      Cp: Piecewise | arg = T; pieces = {200.0, 1600.0, 1047.63657-0.372589265*T^1+9.45304214E-4*T^2-6.02409443E-7*T^3+1.2858961E-10*T^4}; argunit = K; fununit = J/(kg*K)

Physics
  solid: SolidMechanics on domains 2, 4-6, 8
    dependent variable u = {u, v, w}
    lemm1: LinearElasticModel "Linear Elastic Material 1" (default)
    free1: Free (default)
    init1: init "Initial Values 1" (default)
    fix2: Fixed "Fixed Constraint" on boundaries 25, 28, 41, 43
  es: Electrostatics on all domains
    dependent variable V
    ccn1: ChargeConservation "Charge Conservation, Solid" (default) | materialType = solid
    zc1: ZeroCharge (default)
    init1: init "Initial Values 1" (default)
    term1: DomainTerminal "Terminal 1" on domains 2 | TerminalName = 1; TerminalType = Voltage; V0 = Vdc
    gnd1: Ground on boundaries 18, 42
    term2: Terminal on boundaries 27 | TerminalType = Voltage; V0 = 0
    ccn2: ChargeConservation on selection sel1
  ht: HeatTransferInSolidsAndFluids on all domains
    dependent variable T
    solid1: SolidHeatTransferModel "Solid 1" (default)
    fluid1: FluidHeatTransferModel "Fluid 1" on no domains
    init1: init "Initial Values 1" (default)
    ins1: ThermalInsulation (default)

Multiphysics
  eme1: ElectromechanicalForces on all domains | Solid_physics = solid; Electrostatics_physics = es

Mesh
  mesh1 "Mesh 1" (physics-controlled)

Studies
  std1 "Study 1"
    stat: Stationary