// COMSOL Multiphysics 5.6.0.401 model "Syde683_project_v3.mph"
// Outline of the model tree

Parameters
  Vdc = 70[V]  // DC bias voltage

Selections
  sel1: Explicit "Air" on domains 1-4, 7, 8, 11, 12

Common definitions
  free1: DeformingDomain on selection sel1 | smoothingType = hyperelastic
  sym1: Symmetry "Symmetry/Roller 1" on no boundaries

Geometry
  geom1 "Geometry 1" (2D, length unit µm)
    r1: Rectangle | pos = {-5, 0.20035}; size = {5, 149.65[nm]}
    r2: Rectangle | pos = {-5, 0.2}; size = {5, 0.35[nm]}
    r3: Rectangle | pos = {-7, 0.1}; size = {7, 0.1}
    r4: Rectangle | pos = {-5, 0}; size = {5, 0.1}
    r5: Rectangle | pos = {-7, 0.35}; size = {7, 0.1}
    r6: Rectangle | pos = {-7, 0.2}; size = {2, 0.15}
    mir1: Mirror | input = r1, r2, r3, r4, r5, r6; keep = on; axis = {1, 0}
    fin: Finalize "Form Union"

Materials
  mat1: Common "Air" on selection sel1
    def "Basic"
      thermalexpansioncoefficient = alpha_p(pA,T)
      molarmass = 0.02897[kg/mol]
      bulkviscosity = muB(T)
      relpermeability = 1
      relpermittivity = 1
      dynamicviscosity = eta(T)
      ratioofspecificheat = 1.4
      electricconductivity = 0[S/m]
      heatcapacity = Cp(T)
      density = rho(pA,T)
      thermalconductivity = k(T)
      soundspeed = cs(T)
      eta: Piecewise | arg = T; pieces = {200.0, 1600.0, -8.38278E-7+8.35717342E-8*T^1-7.69429583E-11*T^2+4.6437266E-14*T^3-1.06585607E-17*T^4}; argunit = K; fununit = Pa*s
      Cp: Piecewise | arg = T; pieces = {200.0, 1600.0, 1047.63657-0.372589265*T^1+9.45304214E-4*T^2-6.02409443E-7*T^3+1.2858961E-10*T^4}; argunit = K; fununit = J/(kg*K)
      rho: Analytic | expr = pA*0.02897/R_const[K*mol/J]/T; args = {pA, T}; argunit = Pa,K; fununit = kg/m^3
      k: Piecewise | arg = T; pieces = {200.0, 1600.0, -0.00227583562+1.15480022E-4*T^1-7.90252856E-8*T^2+4.11702505E-11*T^3-7.43864331E-15*T^4}; argunit = K; fununit = W/(m*K)
      cs: Analytic | expr = sqrt(1.4*R_const[K*mol/J]/0.02897*T); args = T; argunit = K; fununit = m/s
      an1: Analytic | funcname = alpha_p; expr = -1/rho(pA,T)*d(rho(pA,T),T); args = {pA, T}; argunit = Pa,K; fununit = 1/K
      an2: Analytic "Analytic 2a" | funcname = muB; expr = 0.6*eta(T); args = T; argunit = K; fununit = Pa*s
    RefractiveIndex
      n = 1
      ki = 0
    NonlinearModel
      BA = (def.gamma+1)/2
    idealGas
      Rs = R_const/Mn
      heatcapacity = Cp(T)
      ratioofspecificheat = 1.4
      molarmass = 0.02897
      Cp: Piecewise | arg = T; pieces = {200.0, 1600.0, 1047.63657-0.372589265*T^1+9.45304214E-4*T^2-6.02409443E-7*T^3+1.2858961E-10*T^4}; argunit = K; fununit = J/(kg*K)
  mat2: Common "Graphene" on domains 5, 9
    def "Basic"
      youngsmodulus = 1000[GPa]
      poissonsratio = 0.17
      density = 2270
      relpermittivity = 3.333
  mat3: Common "PMMA" on domains 6, 10
    def "Basic"
      youngsmodulus = 2.94[GPa]
      poissonsratio = 0.36
      density = 1180
      relpermittivity = 3

Physics
  solid: SolidMechanics on domains 5, 6, 9, 10
    dependent variable u = {u, v, w}
    lemm1: LinearElasticModel "Linear Elastic Material 1" (default)
    free1: Free (default)
    init1: init "Initial Values 1" (default)
    fix1: Fixed "Fixed Constraint 1" on boundaries 11, 13, 29, 31
  es: Electrostatics on all domains
    dependent variable V
    ccn1: ChargeConservation "Charge Conservation, Solid" (default) | materialType = solid
    zc1: ZeroCharge (default)
    init1: init "Initial Values 1" (default)
    ccn2: ChargeConservation on selection sel1
    term1: DomainTerminal "Terminal 1" on selection sel1 | TerminalType = Voltage; V0 = 0
    pot1: ElectricPotential on boundaries 29, 31 | V0 = Vdc
    gnd1: Ground on boundaries 8, 9, 11, 13, 17, 27

Multiphysics
  eme1: ElectromechanicalForces on all domains | Solid_physics = solid; Electrostatics_physics = es

Mesh
  mesh1 "Mesh 1"
    size: MeshSizeDefault | hmax = 0.938; hmin = 0.0042; hcurve = 0.3; hgrad = 1.3
    map1: Map "Mapped 1" on remaining entities
      dis1: Distribution on boundaries 7, 26 | numelem = 10
      dis2: Distribution on boundaries 1, 3, 5, 8 | numelem = 10

Studies
  std1 "Stationary"
    stat: Stationary

Solver configurations
  sol1 "Solution 1" (study std1)
    v1: Variables "Dependent Variables 1"
      comp1_spatial_disp: Field "Spatial mesh displacement (comp1.spatial.disp)"
        scalemethod = manual
        scaleval = 1.40072302758e-07
      comp1_u: Field "Displacement field (comp1.u)" | scalemethod = manual; scaleval = 1e-2*1.40072302758e-05
    s1: Stationary "Stationary Solver 1"
      dDef: Direct
      se1: Segregated | segstabacc = segaacc; segaaccdim = 5
        ss1: SegregatedStep "Electric potential" | segvar = {comp1_V}; linsolver = dDef
        ss2: SegregatedStep "Displacement field" | segvar = {comp1_u}; linsolver = dDef
        ss3: SegregatedStep "Spatial mesh displacement" | segvar = {comp1_spatial_disp}; linsolver = dDef

Datasets
  dset1: Solution | solution = sol1

Plots
  pg1: PlotGroup2D "Displacement (solid)" | data = dset1
    surf1: Surface | expr = solid.disp
  pg2: PlotGroup2D "Electric Potential (es)" | data = dset1
    surf1: Surface | expr = V
  pg3: PlotGroup2D "Biased Displacement" | data = dset1